// SBML level 3 version 1

model holzhutter()

  // Compartments:
  compartment default_compartment = 1;

  // Species:
  species ADPf in default_compartment = 0.25;  // kegg.compound:C00008
  species AMPf in default_compartment = 0;  // kegg.compound:C00020
  species ATPf in default_compartment = 0.25;  // kegg.compound:C00002
  species DHAP in default_compartment = 0.1492;  // kegg.compound:C00111
  species E4P in default_compartment = 0.0063;  // kegg.compound:C00279
  species Fru16P2 in default_compartment = 0.0097;  // kegg.compound:C00354
  species Fru6P in default_compartment = 0.0153;  // kegg.compound:C00085
  species GSH in default_compartment = 3.1136;  // kegg.compound:C00051
  species GSSG in default_compartment = 0.0004;  // kegg.compound:C00127
  species Glc6P in default_compartment = 0.0394;  // kegg.compound:C00092
  species GlcA6P in default_compartment = 0.025;
  species Glcin in default_compartment = 4.5663;  // kegg.compound:C00092
  species $Glcout in default_compartment = 5;  // kegg.compound:C00293
  species GraP in default_compartment = 0.0061;
  species Gri13P2 in default_compartment = 0.0005;  // kegg.compound:C00236
  species Gri23P2f in default_compartment = 2.0601;  // kegg.compound:C01159
  species Gri2P in default_compartment = 0.0084;  // kegg.compound:C00631
  species Gri3P in default_compartment = 0.0658;  // kegg.compound:C00197
  species Lac in default_compartment = 1.6803;  // kegg.compound:C01432
  species $Lacex in default_compartment = 1.68;  // kegg.compound:C01432
  species MgADP in default_compartment = 0.1;
  species MgAMP in default_compartment = 0;
  species MgATP in default_compartment = 1.4;
  species MgGri23P2 in default_compartment = 0.5;
  species Mgf in default_compartment = 0.8;  // kegg.compound:C00305
  species NAD in default_compartment = 0.0653;  // kegg.compound:C00003
  species NADH in default_compartment = 0.0002;  // kegg.compound:C00004
  species NADPHf in default_compartment = 0.004;  // kegg.compound:C00005
  species NADPf in default_compartment = 0;  // kegg.compound:C00006
  species P1NADP in default_compartment = 0;  // kegg.compound:C00006
  species P1NADPH in default_compartment = 0.024;  // kegg.compound:C00005
  species P1f in default_compartment = 0;
  species P2NADP in default_compartment = 0;  // kegg.compound:C00006
  species P2NADPH in default_compartment = 0.024;  // kegg.compound:C00005
  species P2f in default_compartment = 0;
  species PEP in default_compartment = 0.0109;  // kegg.compound:C00074
  species $PRPP in default_compartment = 1;
  species Phi in default_compartment = 0.9992;
  species $Phiex in default_compartment = 1;
  species Pyr in default_compartment = 0.084;  // kegg.compound:C00022
  species $Pyrex in default_compartment = 0.084;  // kegg.compound:C00022
  species Rib5P in default_compartment = 0.014;  // kegg.compound:C00117
  species Rul5P in default_compartment = 0.0047;  // kegg.compound:C00199
  species Sed7P in default_compartment = 0.0154;  // kegg.compound:C05382
  species Xul5P in default_compartment = 0.0127;  // kegg.compound:C03291

  // Parameters:
  KMg23P2Gv1 = 6.21128;
  KAMPv16 = 0.0997994;
  Keqv28 = 1;
  KNADPHv18 = 0.001791209;
  K1v24 = 0.00823;
  K1v26 = 0.00184;
  KPGA23v18 = 0.09946517;
  Vmaxv2 = 935;
  K1v23 = 0.3880088;
  Inhibv1 = 0.8395569;
  KNADHv6 = 0.0105041;
  KNADPHv17 = 0.00312;
  Mgtot = 2.8;
  protein1 = 0.02177876;
  KR5Pv22 = 2.2;
  KR5Pv25 = 0.57;
  Keqv19 = 0.9406798;
  kDPGMv8 = 76000;
  KATPv3 = 0.01;
  KMgATPMgv1 = 1.14;
  Keqv4 = 0.114;
  KGlc6Pv1 = 0.0045;
  KGlc6Pv2 = 0.1611711;
  Vmaxv29 = 10000;
  Vmaxv28 = 10000;
  EqMult = 1000;
  KMinv0 = 6.696018;
  Vmaxv23 = 25.463;
  Vmaxv22 = 730;
  Vmaxv21 = 6276.832;
  Vmaxv27 = 100;
  Vmaxv26 = 36.49113;
  Vmaxv25 = 1.176274;
  Vmaxv24 = 30.40863;
  K6v24 = 0.4925381;
  K6v26 = 0.110034;
  Vmaxv3 = 239;
  Vmaxv4 = 82.84242;
  Vmaxv5 = 4404.696;
  KNADPv17 = 0.003542554;
  K6v23 = 0.01377167;
  KNADPv19 = 0.07588617;
  KNADPv18 = 0.018;
  KMgADPv12 = 0.4388001;
  KATPv12 = 3.39;
  Keqv24 = 1.05;
  Keqv27 = 1;
  KPGA23v17 = 2.289;
  KATPv16 = 0.1734823;
  KATPv17 = 0.749;
  Keqv23 = 1.05;
  Keqv22 = 3;
  L0v3 = 0.001072;
  KATPv18 = 0.2042572;
  Vmaxv7 = 5000;
  Keqv29 = 1;
  K5v23 = 0.41139;
  Keqv2 = 0.3925;
  KGraPv6 = 0.006356442;
  KGraPv4 = 0.2962262;
  KGraPv5 = 0.428;
  Vmaxv6 = 4300;
  Keqv1 = 3900;
  K2PGv10 = 0.8104205;
  K2PGv11 = 1;
  Vmaxv9 = 0.53;
  KMoutv0 = 1.7;
  K3v23 = 12.432;
  Keqv11 = 1.7;
  Keqv12 = 13987.57;
  Keqv13 = 9090;
  Keqv14 = 14181.8;
  K3v26 = 0.05670195;
  Keqv16 = 0.25;
  K3v24 = 0.1998656;
  Keqv18 = 141.7;
  KMgv1 = 1.2666;
  KMgv3 = 0.44;
  K2v24 = 0.05412127;
  K2v26 = 0.4771769;
  KMgADPv7 = 0.3549681;
  Kd23P2G = 1.667;
  GStotal = 3.044955;
  KRu5Pv21 = 0.19;
  KMGlcv1 = 0.08717287;
  protein2 = 0.02737208;
  Vmaxv12 = 570;
  Vmaxv13 = 2800000;
  Vmaxv10 = 2000;
  Vmaxv11 = 1500;
  Vmaxv16 = 1380;
  Vmaxv17 = 162;
  kLDHv14 = 184.6928;
  Vmaxv18 = 1305.31;
  Vmaxv19 = 90;
  Vmaxv0 = 33.6;
  KX5Pv21 = 0.4877003;
  Vmax1v1 = 15.8;
  K3PGv10 = 5;
  KG6Pv17 = 0.06261365;
  Kd4 = 0.0002;
  K7v26 = 0.215;
  K7v24 = 2.431607;
  K7v23 = 48.8;
  Kd1 = 0.0002;
  Kd2 = 1e-5;
  Kd3 = 1e-5;
  Keqv10 = 0.1298537;
  KGSHv19 = 23.83687;
  KDHAPv5 = 0.9497396;
  KDHAPv4 = 0.0364;
  K4v26 = 0.0003;
  K4v24 = 0.006095;
  K4v23 = 0.004095592;
  KFru16P2v4 = 0.008350529;
  alfav0 = 0.54;
  KdADP = 0.6176853;
  KdAMP = 10.97174;
  KMgATPv7 = 0.3731855;
  KMgATPv3 = 0.068;
  KiGraPv4 = 0.0572;
  KMgATPv1 = 0.9073899;
  Keqv17 = 2094.225;
  KAMPv3 = 0.033;
  KdATP = 0.072;
  Keqv6 = 0.0001676239;
  Keqv7 = 1455;
  KNADv6 = 0.05;
  Keqv5 = 0.04048606;
  KNADPHv19 = 0.00852;
  K5v24 = 0.8683;
  Keqv0 = 0.544869;
  K5v26 = 0.0287;
  Keqv8 = 141914.4;
  Keqv9 = 100000;
  K2v23 = 0.3126479;
  KGSSGv19 = 0.0652;
  Kv20 = 0.03;
  KiiGraPv4 = 0.176;
  Vmax2v1 = 33.2;
  Keqv3 = 100000;
  K23P2Gv9 = 0.1307313;
  K23P2Gv8 = 0.03494114;
  kATPasev15 = 1.68;
  K23P2Gv1 = 3.088833;
  Atot = 2.632109;
  KFru6Pv2 = 0.071;
  KFru6Pv3 = 0.1067803;
  Keqv25 = 100000;
  K3PGv7 = 1.145257;
  Keqv26 = 1.2;
  KADPv16 = 0.09380911;
  KRu5Pv22 = 0.78;
  Keqv21 = 3.732623;
  NADPtot = 0.052;
  KPv6 = 3.755897;
  K6PG1v18 = 0.01;
  KPEPv11 = 1;
  KPEPv12 = 0.1353807;
  K13P2Gv6 = 0.0035;
  K13P2Gv7 = 0.002;
  NADtot = 0.0655;
  KFru16P2v12 = 0.005;
  L0v12 = 13.2222;
  K6PG2v18 = 0.06499707;
  KATPv25 = 0.03;

  // Reactions:
  v_1: $Glcout -> Glcin; Vmaxv0/KMoutv0*(Glcout - Glcin/Keqv0)/(1 + Glcout/KMoutv0 + Glcin/KMinv0 + alfav0*Glcout*Glcin/KMoutv0/KMinv0);
  v_10: Gri23P2f -> Gri3P + Phi; Vmaxv9*(Gri23P2f + MgGri23P2 - Gri3P/Keqv9)/(Gri23P2f + MgGri23P2 + K23P2Gv9);  // modifiers: MgGri23P2
  v_11: Gri3P -> Gri2P; Vmaxv10*(Gri3P - Gri2P/Keqv10)/(Gri3P + K3PGv10*(1 + Gri2P/K2PGv10));
  v_12: Gri2P -> PEP; Vmaxv11*(Gri2P - PEP/Keqv11)/(Gri2P + K2PGv11*(1 + PEP/KPEPv11));
  v_13: PEP + MgADP -> Pyr + MgATP; Vmaxv12*(PEP*MgADP - Pyr*MgATP/Keqv12)/((PEP + KPEPv12)*(MgADP + KMgADPv12)*(1 + L0v12*(1 + (ATPf + MgATP)/KATPv12)^4/((1 + PEP/KPEPv12)^4*(1 + Fru16P2/KFru16P2v12)^4)));  // modifiers: ATPf, Fru16P2
  v_14: Pyr + NADH -> Lac + NAD; Vmaxv13*(Pyr*NADH - Lac*NAD/Keqv13);
  v_15: Pyr + NADPHf -> Lac + NADPf; kLDHv14*(Pyr*NADPHf - Lac*NADPf/Keqv14);
  v_16: MgATP -> MgADP + Phi; kATPasev15*MgATP;
  v_17: MgATP + AMPf -> MgADP + ADPf; Vmaxv16/(KATPv16*KAMPv16)*(MgATP*AMPf - MgADP*ADPf/Keqv16)/((1 + MgATP/KATPv16)*(1 + AMPf/KAMPv16) + (MgADP + ADPf)/KADPv16 + MgADP*ADPf/KADPv16^2);
  v_18: Glc6P + NADPf -> GlcA6P + NADPHf; Vmaxv17/KG6Pv17/KNADPv17*(Glc6P*NADPf - GlcA6P*NADPHf/Keqv17)/(1 + NADPf*(1 + Glc6P/KG6Pv17)/KNADPv17 + (ATPf + MgATP)/KATPv17 + NADPHf/KNADPHv17 + (Gri23P2f + MgGri23P2)/KPGA23v17);  // modifiers: ATPf, MgATP, Gri23P2f, MgGri23P2
  v_19: GlcA6P + NADPf -> Rul5P + NADPHf; Vmaxv18/K6PG1v18/KNADPv18*(GlcA6P*NADPf - Rul5P*NADPHf/Keqv18)/((1 + NADPf/KNADPv18)*(1 + GlcA6P/K6PG1v18 + (Gri23P2f + MgGri23P2)/KPGA23v18) + (ATPf + MgATP)/KATPv18 + NADPHf*(1 + GlcA6P/K6PG2v18)/KNADPHv18);  // modifiers: MgGri23P2, Gri23P2f, ATPf, MgATP
  v_2: Glcin + MgATP -> Glc6P + MgADP; Inhibv1*Glcin/(Glcin + KMGlcv1)*(Vmax1v1/KMgATPv1)*(MgATP + Vmax2v1/Vmax1v1*MgATP*Mgf/KMgATPMgv1 - Glc6P*MgADP/Keqv1)/(1 + MgATP/KMgATPv1*(1 + Mgf/KMgATPMgv1) + Mgf/KMgv1 + (1.55 + Glc6P/KGlc6Pv1)*(1 + Mgf/KMgv1) + (Gri23P2f + MgGri23P2)/K23P2Gv1 + Mgf*(Gri23P2f + MgGri23P2)/(KMgv1*KMg23P2Gv1));  // modifiers: Mgf, Gri23P2f, MgGri23P2
  v_20: GSSG + NADPHf -> 2 GSH + NADPf; Vmaxv19*(GSSG*NADPHf/(KGSSGv19*KNADPHv19) - GSH^2/KGSHv19^2*NADPf/(KNADPv19*Keqv19))/(1 + NADPHf*(1 + GSSG/KGSSGv19)/KNADPHv19 + NADPf/KNADPv19*(1 + GSH*(1 + GSH/KGSHv19)/KGSHv19));
  v_21: 2 GSH -> GSSG; Kv20*GSH;
  v_22: Rul5P -> Xul5P; Vmaxv21*(Rul5P - Xul5P/Keqv21)/(Rul5P + KRu5Pv21*(1 + Xul5P/KX5Pv21));
  v_23: Rul5P -> Rib5P; Vmaxv22*(Rul5P - Rib5P/Keqv22)/(Rul5P + KRu5Pv22*(1 + Rib5P/KR5Pv22));
  v_24: Rib5P + Xul5P -> GraP + Sed7P; Vmaxv23*(Rib5P*Xul5P - GraP*Sed7P/Keqv23)/((K1v23 + Rib5P)*Xul5P + (K2v23 + K6v23*Sed7P)*Rib5P + (K3v23 + K5v23*Sed7P)*GraP + K4v23*Sed7P + K7v23*Xul5P*GraP);
  v_25: Sed7P + GraP -> E4P + Fru6P; Vmaxv24*(Sed7P*GraP - E4P*Fru6P/Keqv24)/((K1v24 + GraP)*Sed7P + (K2v24 + K6v24*Fru6P)*GraP + (K3v24 + K5v24*Fru6P)*E4P + K4v24*Fru6P + K7v24*Sed7P*E4P);
  v_26: Rib5P + MgATP -> $PRPP + MgAMP; Vmaxv25*(Rib5P*MgATP - PRPP*MgAMP/Keqv25)/((KATPv25 + MgATP)*(KR5Pv25 + Rib5P));
  v_27: E4P + Xul5P -> GraP + Fru6P; Vmaxv26*(E4P*Xul5P - GraP*Fru6P/Keqv26)/((K1v26 + E4P)*Xul5P + (K2v26 + K6v26*Fru6P)*E4P + (K3v26 + K5v26*Fru6P)*GraP + K4v26*Fru6P + K7v26*Xul5P*GraP);
  v_28: $Phiex -> Phi; Vmaxv27*(Phiex - Phi/Keqv27);
  v_29: $Lacex -> Lac; Vmaxv28*(Lacex - Lac/Keqv28);
  v_3: Glc6P -> Fru6P; Vmaxv2*(Glc6P - Fru6P/Keqv2)/(Glc6P + KGlc6Pv2*(1 + Fru6P/KFru6Pv2));
  v_30: $Pyrex -> Pyr; Vmaxv29*(Pyrex - Pyr/Keqv29);
  v_31: MgATP -> ATPf + Mgf; EqMult*(MgATP - Mgf*ATPf/KdATP);
  v_32: MgADP -> ADPf + Mgf; EqMult*(MgADP - Mgf*ADPf/KdADP);
  v_33: MgAMP -> AMPf + Mgf; EqMult*(MgAMP - Mgf*AMPf/KdAMP);
  v_34: MgGri23P2 -> Gri23P2f + Mgf; EqMult*(MgGri23P2 - Mgf*Gri23P2f/Kd23P2G);
  v_35: P1NADP -> P1f + NADPf; EqMult*(P1NADP - P1f*NADPf/Kd1);
  v_36: P1NADPH -> P1f + NADPHf; EqMult*(P1NADPH - P1f*NADPHf/Kd3);
  v_37: P2NADP -> P2f + NADPf; EqMult*(P2NADP - P2f*NADPf/Kd2);
  v_38: P2NADPH -> P2f + NADPHf; EqMult*(P2NADPH - P2f*NADPHf/Kd4);
  v_4: Fru6P + MgATP -> Fru16P2 + MgADP; Vmaxv3*(Fru6P*MgATP - Fru16P2*MgADP/Keqv3)/((Fru6P + KFru6Pv3)*(MgATP + KMgATPv3)*(1 + L0v3*((1 + ATPf/KATPv3)*(1 + Mgf/KMgv3)/((1 + (AMPf + MgAMP)/KAMPv3)*(1 + Fru6P/KFru6Pv3)))^4));  // modifiers: AMPf, MgAMP, ATPf, Mgf
  v_5: Fru16P2 -> GraP + DHAP; Vmaxv4/KFru16P2v4*(Fru16P2 - GraP*DHAP/Keqv4)/(1 + Fru16P2/KFru16P2v4 + GraP/KiGraPv4 + DHAP*(GraP + KGraPv4)/(KDHAPv4*KiGraPv4) + Fru16P2*GraP/(KFru16P2v4*KiiGraPv4));
  v_6: DHAP -> GraP; Vmaxv5*(DHAP - GraP/Keqv5)/(DHAP + KDHAPv5*(1 + GraP/KGraPv5));
  v_7: GraP + Phi + NAD -> Gri13P2 + NADH; Vmaxv6/(KNADv6*KGraPv6*KPv6)*(NAD*GraP*Phi - Gri13P2*NADH/Keqv6)/((1 + NAD/KNADv6)*(1 + GraP/KGraPv6)*(1 + Phi/KPv6) + (1 + NADH/KNADHv6)*(1 + Gri13P2/K13P2Gv6) - 1);
  v_8: Gri13P2 + MgADP -> Gri3P + MgATP; Vmaxv7/(KMgADPv7*K13P2Gv7)*(MgADP*Gri13P2 - MgATP*Gri3P/Keqv7)/((1 + MgADP/KMgADPv7)*(1 + Gri13P2/K13P2Gv7) + (1 + MgATP/KMgATPv7)*(1 + Gri3P/K3PGv7) - 1);
  v_9: Gri13P2 -> Gri23P2f; kDPGMv8*(Gri13P2 - (Gri23P2f + MgGri23P2)/Keqv8)/(1 + (Gri23P2f + MgGri23P2)/K23P2Gv8);  // modifiers: MgGri23P2
end
